// COMSOL Multiphysics 5.5.0.292 model "1dpctm.mph"
// Outline of the model tree

Parameters
  d = 100 [nm]  // Slab length
  nl = 1.45
  nh = 2.06
  nin = 1.55
  nout = 1
  alpha = 0[deg]
  lda0 = 400 [nm]

Geometry
  geom1 "Geometry 1" (2D, length unit µm)
    r1: Rectangle
      layername = {Layer 1, Layer 2, Layer 3, Layer 4, Layer 5, Layer 6, Layer 7, Layer 8, Layer 9, Layer 10, Layer 11}
      layer = {0.5, d, d, d, d, d, d, d, d, d, d}
      size = {1, 2}
    fin: Finalize "Form Union"

Materials
  mat1: Common "Material 1" on domains 1
    RefractiveIndex
      n = nin
      ki = 0
  mat2: Common "Material 2" on domains 12
    RefractiveIndex
      n = nout
      ki = 0
  mat3: Common "Material 3" on domains 2, 4, 6, 8, 10
    RefractiveIndex
      n = nl
      ki = 0
  mat4: Common "Material 4" on domains 3, 5, 7, 9, 11
    RefractiveIndex
      n = nh
      ki = 0

Physics
  ewfd: ElectromagneticWavesFrequencyDomain on all domains
    dependent variable E = {Ex, Ey, Ez}
    wee1: WaveEquationElectric (default)
    pec1: PerfectElectricConductor (default)
    init1: init "Initial Values 1" (default)
    port1: Port on boundaries 2
      PortType = Periodic
      InputType = H
      Eampl = {0, 0, 1}
      Hampl = {0, 0, 1}
      alpha_inc = alpha
      n = nin
    port2: Port on boundaries 25 | PortType = Periodic; InputType = H; Eampl = {0, 0, 1}; Hampl = {0, 0, 1}; n = nout
    pc1: PeriodicCondition on boundaries 1, 3, 5, 7, 9, 11, 13, 15, 17, 19, 21, 23, 26-37
      PeriodicType = Floquet
      Floquet_source = FromPeriodicPort
      destinationDomains: boundaries 26-37

Mesh
  mesh1 "Mesh 1" (physics-controlled)

Studies
  std1 "Study 1"
    wave: Wavelength "Wavelength Domain" | punit = nm; plist = range(300[nm],5[nm],900[nm]); useparam = on

Solver configurations
  sol1 "Solution 1" (study std1)
    v1: Variables "Dependent Variables 1"
    s1: Stationary "Stationary Solver 1" | stol = 0.01
      p1: Parametric
        sweeptype = filled
        pname = {lambda0, alpha}
        plistarr = {range(300[nm],5[nm],900[nm]), range(0,1[deg],80[deg])}
        punit = {nm, deg}
        pcontinuationmode = no
      fc1: FullyCoupled | linsolver = d1
      d1: Direct "Suggested Direct Solver (ewfd)"

Datasets
  dset1: Solution | solution = sol1
  grid1: Grid1D | source = data; data = dset1; par1 = PHASE; parmax1 = 2*pi/1.0E-6

Plots
  pg1: PlotGroup2D "Electric Field (ewfd)" | data = dset1
    surf1: Surface | expr = ewfd.Hz
    con1: Contour | expr = ewfd.Hz
  pg2: PlotGroup1D "Reflectance, Transmittance, and Absorptance (ewfd)"
    data = dset1
    ylabel = Reflectance, transmittance, and absorptance (1)
    glob1: Global
      data = dset1
      expr = ewfd.Rorder_0
      unit = 1
      descr = Reflectance, order 0
      xdata = expr
      xdataexpr = lambda0
      col1: Color "Color Expression 1" | expr = ewfd.Rorder_0; descr = Reflectance, order 0
  pg3: PlotGroup1D "Polarization Plot (ewfd)"
    data = grid1
    title = Polarization states, Color: Phase (Radians)
    xlabel = Jones vector, out-of-plane component
    ylabel = Jones vector, in-plane component
    lngr1: LineGraph
      expr = if(root.comp1.ewfd.normJR_0==0,0,0.5*root.comp1.ewfd.JRIP_0*exp(j*PHASE)/root.comp1.ewfd.normJR_0)+(0)
      xdata = expr
      xdataexpr = if(root.comp1.ewfd.normJR_0==0,0,0.5*root.comp1.ewfd.JROOP_0*exp(j*PHASE)/root.comp1.ewfd.normJR_0)+(0)
      legends = Reflection
      col1: Color "Color Expression 1" | expr = PHASE*1.0E-6
    ann1: Annotation | text = m=0
    lngr2: LineGraph
      expr = if(root.comp1.ewfd.normJT_0==0,0,0.5*root.comp1.ewfd.JTIP_0*exp(j*PHASE)/root.comp1.ewfd.normJT_0)+(0)
      xdata = expr
      xdataexpr = if(root.comp1.ewfd.normJT_0==0,0,0.5*root.comp1.ewfd.JTOOP_0*exp(j*PHASE)/root.comp1.ewfd.normJT_0)+(0)
      legends = Transmission
      col1: Color "Color Expression 1" | expr = PHASE*1.0E-6
  pg4: PlotGroup1D "1D Plot Group 4" | data = dset1
    glob1: Global
      data = dset1
      expr = ewfd.Rorder_0
      unit = 1
      descr = Reflectance, order 0
      xdata = expr
      xdataexpr = alpha
      col1: Color "Color Expression 1" | expr = ewfd.Rtotal; descr = Total reflectance