// COMSOL Multiphysics 5.5.0.292 model "SPPs2.mph"
// Outline of the model tree

Parameters
  lda0 = 800 [nm]
  alpha = 0 [deg]

Geometry
  geom1 "Geometry 1" (2D, length unit nm)
    r1: Rectangle | base = center; layername = {Layer 1, Layer 2}; layer = {3050/2-50/2, 50}; size = {1500, 3050}
    fin: Finalize "Form Union"

Materials
  mat1: Common "Glass" on domains 1
    RefractiveIndex
      n = 1.55
      ki = 0
  mat2: Common "Water" on domains 3
    RefractiveIndex
      n = 1.33
      ki = 0
  mat4: Common "Au (Gold) (Hagemann et al. 1974 #2: n,k 0.003542-0.8266 µm)" on domains 2
    RefractiveIndex
      n = n_interp(c_const/freq)
      ki = k_interp(c_const/freq)
      int1: Interpolation "Refractive index"
        funcname = n_interp
        table = 
          {3.542E-9, 0.991}
          {4.133e-09, 0.99}
          {4.428e-09, 0.99}
          {4.769e-09, 0.989}
          {5.166E-9, 0.989}
          {5.636E-9, 0.987}
          {6.199e-09, 0.985}
          {6.525e-09, 0.984}
          {6.888e-09, 0.983}
          {7.293e-09, 0.979}
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        interp = piecewisecubic
        argunit = m
        fununit = 1
      int2: Interpolation "Refractive index, imaginary part"
        funcname = k_interp
        table = 
          {3.542E-9, 0.00167}
          {4.133e-09, 0.00324}
          {4.428e-09, 0.00401}
          {4.769e-09, 0.00553}
          {5.166E-9, 0.00528}
          {5.636E-9, 0.00581}
          {6.199e-09, 0.00572}
          {6.525e-09, 0.00548}
          {6.888e-09, 0.00481}
          {7.293e-09, 0.00365}
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        interp = piecewisecubic
        argunit = m
        fununit = 1

Physics
  ewfd: ElectromagneticWavesFrequencyDomain "p-polarization" on all domains
    dependent variable E = {Ex, Ey, Ez}
    wee1: WaveEquationElectric (default)
    pec1: PerfectElectricConductor (default)
    init1: init "Initial Values 1" (default)
    wee2: WaveEquationElectric on domains 2
    port1: Port on boundaries 2
      PortType = Periodic
      InputType = H
      Eampl = {0, 0, 1}
      Hampl = {0, 0, 1}
      alpha_inc = alpha
      n = 1.55
    port2: Port on boundaries 7 | PortType = Periodic; InputType = H; Eampl = {0, 0, 1}; Hampl = {0, 0, 1}; n = 1.33
    pc1: PeriodicCondition on boundaries 1, 3, 5, 8-10
      PeriodicType = Floquet
      Floquet_source = FromPeriodicPort
      destinationDomains: boundaries 8-10
  ewfd2: ElectromagneticWavesFrequencyDomain "s-polarization" on all domains
    dependent variable E2 = {E2x, E2y, E2z}
    wee1: WaveEquationElectric (default)
      DisplacementFieldModel = RefractiveIndex
      ConstitutiveRelationH = RelativePermeability
    pec1: PerfectElectricConductor (default) | constraintType = symmetricConstraint; constraintMethod = elemental
    init1: init "Initial Values 1" (default)
    wee2: WaveEquationElectric on domains 2
      DisplacementFieldModel = RefractiveIndex
      ConstitutiveRelationH = RelativePermeability
    port1: Port on boundaries 2 | InputType = E
    port2: Port on boundaries 7 | InputType = E
    pc1: PeriodicCondition on boundaries 1, 3, 5, 8-10
      PeriodicType = Floquet
      Floquet_source = FromPeriodicPort
      constraintType = symmetricConstraint
      constraintMethod = nodal
      TransformationMethod = automatic
      destinationDomains: boundaries 8-10

Mesh
  mesh1 "Mesh 1" (physics-controlled)

Studies
  std1 "p-polarization"
    wave: Wavelength "Wavelength Domain"
      punit = nm
      plist = range(200 [nm],200 [nm],800 [nm])
      solve for = {ewfd}
      useparam = on
  std2 "s-polarization"
    wave: Wavelength "Wavelength Domain" | punit = nm; plist = 800 [nm]; solve for = {ewfd2}; useparam = on
  std3 "circular polarization"
    wave: Wavelength "Wavelength Domain" | punit = nm; plist = 800 [nm]; useparam = on

Solver configurations
  sol1 "Solution 1" (study std1)
    v1: Variables "Dependent Variables 1"
    s1: Stationary "Stationary Solver 1" | stol = 0.01
      p1: Parametric
        sweeptype = filled
        pname = {lambda0, alpha}
        plistarr = {range(200 [nm],200 [nm],800 [nm]), range(0,0.5[deg],80[deg])}
        punit = {nm, deg}
        pcontinuationmode = no
      fc1: FullyCoupled | linsolver = d1
      d1: Direct "Suggested Direct Solver (ewfd)"
  sol2 "Solution 2" (study std2)
    v1: Variables "Dependent Variables 1"
    s1: Stationary "Stationary Solver 1" | stol = 0.01
      p1: Parametric
        sweeptype = filled
        pname = {lambda0, alpha}
        plistarr = {800 [nm], range(0,0.1[deg],80[deg])}
        punit = {nm, deg}
        pcontinuationmode = no
      fc1: FullyCoupled | linsolver = d1
      d1: Direct "Suggested Direct Solver (ewfd2)"
  sol3 "Solution 3" (study std3)
    v1: Variables "Dependent Variables 1"
    s1: Stationary "Stationary Solver 1" | stol = 0.01
      p1: Parametric
        sweeptype = filled
        pname = {lambda0, alpha}
        plistarr = {800 [nm], range(0,0.1[deg],80[deg])}
        punit = {nm, deg}
        pcontinuationmode = no
      fc1: FullyCoupled | linsolver = d1
      d1: Direct "Suggested Direct Solver (ewfd) (merged)"

Datasets
  dset1: Solution | solution = sol1
  grid1: Grid1D | source = data; data = dset1; par1 = PHASE; parmax1 = 2*pi/1.0E-9
  dset2: Solution | solution = sol2
  grid2: Grid1D | source = data; data = dset2; par1 = PHASE; parmax1 = 2*pi/1.0E-9
  dset3: Solution | solution = sol3
  grid3: Grid1D | source = data; data = dset3; par1 = PHASE; parmax1 = 2*pi/1.0E-9
  grid4: Grid1D | source = data; data = dset3; par1 = PHASE; parmax1 = 2*pi/1.0E-9

Plots
  pg1: PlotGroup2D "Electric field (ewfd)" | data = dset1
    surf1: Surface | expr = ewfd.Hz
      hght1: Height "Height Expression 1" | expr = ewfd.normE
  pg2: PlotGroup1D "Reflectance, Transmittance, and Absorptance (ewfd)"
    data = dset1
    ylabel = Reflectance, transmittance, and absorptance (1)
    glob3: Global
      data = dset1
      expr = ewfd.Rorder_0
      unit = 1
      descr = Reflectance, 400 nm
      xdata = expr
      xdataexpr = alpha
    glob1: Global
      data = dset1
      expr = ewfd.Rorder_0
      unit = 1
      descr = Reflectance, 600 nm
      xdata = expr
      xdataexpr = alpha
    glob2: Global
      data = dset1
      expr = ewfd.Rorder_0
      unit = 1
      descr = Reflectance, 800 nm
      xdata = expr
      xdataexpr = alpha
  pg3: PlotGroup1D "Polarization Plot (ewfd)"
    data = grid1
    title = Polarization states, Color: Phase (Radians)
    xlabel = Jones vector, out-of-plane component
    ylabel = Jones vector, in-plane component
    lngr1: LineGraph
      expr = if(root.comp1.ewfd.normJR_0==0,0,0.5*root.comp1.ewfd.JRIP_0*exp(j*PHASE)/root.comp1.ewfd.normJR_0)+(0)
      xdata = expr
      xdataexpr = if(root.comp1.ewfd.normJR_0==0,0,0.5*root.comp1.ewfd.JROOP_0*exp(j*PHASE)/root.comp1.ewfd.normJR_0)+(0)
      legends = Reflection
      col1: Color "Color Expression 1" | expr = PHASE*1.0E-9
    ann1: Annotation | text = m=0
    lngr2: LineGraph
      expr = if(root.comp1.ewfd.normJT_0==0,0,0.5*root.comp1.ewfd.JTIP_0*exp(j*PHASE)/root.comp1.ewfd.normJT_0)+(0)
      xdata = expr
      xdataexpr = if(root.comp1.ewfd.normJT_0==0,0,0.5*root.comp1.ewfd.JTOOP_0*exp(j*PHASE)/root.comp1.ewfd.normJT_0)+(0)
      legends = Transmission
      col1: Color "Color Expression 1" | expr = PHASE*1.0E-9
  pg4: PlotGroup2D "Electric Field (ewfd2)" | data = dset2
    surf1: Surface | expr = ewfd2.Ez
  pg5: PlotGroup1D "Reflectance, Transmittance, and Absorptance (ewfd2)"
    data = dset2
    ylabel = Reflectance, transmittance, and absorptance (1)
    glob1: Global | expr = ewfd2.Rorder_0; unit = 1; descr = Reflectance, order 0; xdata = expr; xdataexpr = alpha
  pg6: PlotGroup1D "Polarization Plot (ewfd2)"
    data = grid2
    title = Polarization states, Color: Phase (Radians)
    xlabel = Jones vector, out-of-plane component
    ylabel = Jones vector, in-plane component
    lngr1: LineGraph
      expr = if(root.comp1.ewfd2.normJR_0==0,0,0.5*root.comp1.ewfd2.JRIP_0*exp(j*PHASE)/root.comp1.ewfd2.normJR_0)+(0)
      xdata = expr
      xdataexpr = if(root.comp1.ewfd2.normJR_0==0,0,0.5*root.comp1.ewfd2.JROOP_0*exp(j*PHASE)/root.comp1.ewfd2.normJR_0)+(0)
      legends = Reflection
      col1: Color "Color Expression 1" | expr = PHASE*1.0E-9
    ann1: Annotation | text = m=0
    lngr2: LineGraph
      expr = if(root.comp1.ewfd2.normJT_0==0,0,0.5*root.comp1.ewfd2.JTIP_0*exp(j*PHASE)/root.comp1.ewfd2.normJT_0)+(0)
      xdata = expr
      xdataexpr = if(root.comp1.ewfd2.normJT_0==0,0,0.5*root.comp1.ewfd2.JTOOP_0*exp(j*PHASE)/root.comp1.ewfd2.normJT_0)+(0)
      legends = Transmission
      col1: Color "Color Expression 1" | expr = PHASE*1.0E-9
  pg7: PlotGroup1D "Comparative study" | data = dset1
    glob1: Global | data = dset1; expr = ewfd.Rorder_0; unit = 1; descr = p-polarization
    glob2: Global | data = dset2; expr = ewfd2.Rorder_0; unit = 1; descr = s-polarization
    glob3: Global | data = dset3; expr = 0.5*ewfd2.Rtotal+0.5*ewfd.Rtotal; unit = 1; descr = circular polarization
  pg8: PlotGroup2D "2D Plot Group 8" | data = dset3
    surf1: Surface | expr = ewfd2.Ez/sqrt(2)+i*ewfd.Ex/sqrt(2)