// COMSOL Multiphysics 5.5.0.292 model "cherenkov2.mph"
// Outline of the model tree

Parameters
  e = -1.6e-19 [C]  // Electron charge
  sigma = 1e-9[m]  // Sigma parameter
  E0 = 511[keV]  // Electron rest energy
  K = 511[keV]  // Electron kinetic energy
  beta = sqrt(1-1/((K/E0)+1)^2)  // Beta parameter
  v0 = beta*c_const  // Electron velocity
  tt = 10[um]/v0  // Flight time

Variables
  var1 "Variables 1"
    pulse1 = (1/sqrt(2*pi)/sigma)*exp(-((x-1)-v0*t)^2/(2*sigma^2))  // Gaussian distribution for delta(x)
    pulse2 = (1/sqrt(2*pi)/sigma)*exp(-(y)^2/(2*sigma^2))  // Gaussian distribution for delta(y)
    pulse3 = (1/sqrt(2*pi)/sigma)*exp(-(z)^2/(2*sigma^2))  // Gaussian distribution for delta(z=0)
    pulse = pulse1*pulse2*pulse3  // Gaussian pulse
    rho = e*pulse  // Charge density
    current = e*v0*pulse  // Current density

Coordinate systems
  ab1: AbsorbingLayer on domains 1-6, 10-15

Geometry
  geom1 "Geometry 1" (2D, length unit µm)
    r1: Rectangle | base = center; layername = {Layer 1, Layer 2}; layer = {1, 0.5}; size = {10, 5}
    r2: Rectangle
      base = center
      layername = Layer 1
      layer = 0.4
      layerleft = on
      layerright = on
      layertop = on
      size = {10, 5}
    fin: Finalize "Form Union"

Materials
  mat1: Common "Material 1" on domains 4, 5, 9, 10, 14, 15
    def "Basic"
      relpermittivity = 1.77
      relpermeability = 1
      electricconductivity = 0
  mat2: Common "Material 2" on domains 3, 8, 13
    def "Basic"
      relpermittivity = 2.3
      relpermeability = 1
      electricconductivity = 0
  mat3: Common "Material 3" (disabled) on boundaries 8, 19, 30
    def "Basic"
      relpermittivity = 5
      relpermeability = 1
      electricconductivity = 0
  mat4: Common "Material 4" on domains 1, 2, 6, 7, 11, 12
    def "Basic"
      relpermittivity = 1
      relpermeability = 1
      electricconductivity = 0
  mat5: Common "Material 5" (disabled) on boundaries 6, 17, 28
    def "Basic"
      relpermittivity = 3
      relpermeability = 1
      electricconductivity = 0

Physics
  teew: ElectromagneticWavesDiscontinuousGalerkin "Electromagnetic Waves, Time Explicit" on all domains
    dependent variable E = {Ex, Ey, Ez}
    ShapeProperty.valueType = {complex, complex}
    Components.solveFor = FullWave
    weqs1: WaveEquations (default) | epsilonr_mat = from_mat
    pec1: PerfectElectricConductor (default)
    init1: init "Initial Values 1" (default)
    ecu1: ElectricCurrentDensity on domains 1-15
      Je = {e*v0/sigma^3*exp(-(x+(5-0.4)[um]-v0*t)^2/(2*sigma^2))*exp(-(y)^2/(2*sigma^2)), 0, 0}

Mesh
  mesh1 "Mesh 1" (physics-controlled)
    size: MeshSizeDefault | hauto = 1

Studies
  std1 "Study 1"
    time: Transient "Time Dependent" | tlist = range(0,0.1*tt,tt)

Solver configurations
  sol1 "Solution 1" (study std1)
    v1: Variables "Dependent Variables 1"
    tx1: TimeExplicit "Time-Explicit Solver 1"
      tlist = range(0,0.1*tt,tt)
      tstepping = elemexprs
      exprs = {root.comp1.teew.wtc, root.comp1.teew.wtc, wtc, wtc}
      dDef: Direct

Datasets
  dset1: Solution | solution = sol1

Plots
  pg1: PlotGroup2D "Electric Field Norm (teew)" | data = dset1
    surf1: Surface | expr = teew.normE; descr = Electric field norm; smoothexpr = teew.normE
    arws1: ArrowSurface | expr = {teew.Ex, teew.Ey}; descr = Electric field; arrowlength = normalized
  pg2: PlotGroup1D "1D Plot Group 2" | data = dset1
    glob1: Global

Exports
  anim1: Animation
    movietype = avi
    giffilename = C:\Users\aganf\Desktop\Archivos de Comsol\cherenkov3.gif
    aviqual = 1
    maxframes = 100
    width = 1920
    height = 1080