// COMSOL Multiphysics 5.5.0.292 model "cherenkovfrequency2.mph"
// Outline of the model tree

Parameters
  q = -1.6e-19 [C]  // Particle charge
  K = 10[keV]  // Kinetic energy
  E0 = 511[keV]  // Rest energy
  sigma = 1 [nm]  // Sigma parameter (standard deviation)
  beta = sqrt(1-(1/((K/E0)+1))^2)  // Beta parameter
  v0 = beta*c_const  // Particle velocity

Variables
  var1 "Variables 1"
    beta = sqrt(1-(1/((K/E0)+1))^2)  // Beta paramter
    v0 = beta*c_const  // Particle velocity
    pulse1 = (1/sqrt(2*pi))*exp(-i*ewfd.omega*(x+5[um])/v0)  // Gaussian approximation for delta(x)
    pulse2 = (1/sqrt(2*pi)/sigma)*exp(-(y-10[nm])^2/(2*sigma^2))  // Gaussian approximation for delta(y)
    pulse3 = (1/sqrt(2*pi)/sigma)  // Gaussian approximation for delta(z=0)
    Jf = q*pulse1*pulse2*pulse3*ewfd.omega  // Current density Fourier transform

Coordinate systems
  pml1: PML "Perfectly Matched Layer 1" on domains 1-7, 12-18

Geometry
  geom1 "Geometry 1" (2D, length unit µm)
    r1: Rectangle
      base = center
      layername = Layer 1
      layer = 0.4
      layerleft = on
      layerright = on
      layertop = on
      size = {10.8, 5}
    r2: Rectangle
      pos = {0, -0.01}
      base = center
      layername = Layer 1
      layer = 0.4
      layerleft = on
      layerright = on
      layerbottom = off
      size = {10.8, 0.02}
    r3: Rectangle
      pos = {0, -0.03}
      base = center
      layername = Layer 1
      layer = 0.4
      layerleft = on
      layerright = on
      layerbottom = off
      size = {10.8, 0.02}
    fin: Finalize "Form Union"

Materials
  mat1: Common "Free space" on domains 5, 6, 11, 12, 17, 18
    RefractiveIndex
      n = 1
      ki = 0
  mat2: Common "Ag (Silver) (Babar and Weaver 2015: n,k 0.2066-12.40 µm)" on domains 3, 4, 9, 10, 15, 16
    RefractiveIndex
      n = n_interp(c_const/freq)
      ki = k_interp(c_const/freq)
      int1: Interpolation "Refractive index"
        funcname = n_interp
        table = 
          {2.066e-07, 1.079}
          {2.101E-7, 1.101}
          {2.138e-07, 1.121}
          {2.175e-07, 1.14}
          {2.214E-7, 1.157}
          {2.254e-07, 1.169}
          {2.296E-7, 1.181}
          {2.339E-7, 1.19}
          {2.384E-7, 1.198}
          {2.431E-7, 1.215}
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        interp = piecewisecubic
        argunit = m
        fununit = 1
      int2: Interpolation "Refractive index, imaginary part"
        funcname = k_interp
        table = 
          {2.066e-07, 1.247}
          {2.101E-7, 1.258}
          {2.138e-07, 1.267}
          {2.175e-07, 1.272}
          {2.214E-7, 1.28}
          {2.254e-07, 1.283}
          {2.296E-7, 1.287}
          {2.339E-7, 1.294}
          {2.384E-7, 1.306}
          {2.431E-7, 1.317}
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        interp = piecewisecubic
        argunit = m
        fununit = 1
  mat6: Common "SiC (Silicon carbide) (Singh et al. 1971: Î±-SiC; n(o) 0.488-1.064 µm)" on domains 1, 2, 7, 8, 13, 14
    RefractiveIndex
      n = n_interp(c_const/freq)
      ki = k_interp(c_const/freq)
      int1: Interpolation "Refractive index"
        funcname = n_interp
        table = 
          {4.88e-07, 2.69186231557}
          {4.9376E-7, 2.68843697998}
          {4.9952E-7, 2.6851444699331}
          {5.0528e-07, 2.68197782629}
          {5.1104e-07, 2.67893055035}
          {5.168E-7, 2.67599656704}
          {5.2256E-7, 2.67317019152}
          {5.2832E-7, 2.67044609893}
          {5.3408E-7, 2.66781929683}
          {5.3984e-07, 2.66528510013}
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        interp = piecewisecubic
        argunit = m
        fununit = 1
      int2: Interpolation "Refractive index, imaginary part" | funcname = k_interp; table = {{4.88e-07, 0.0}, {7.76E-7, 0.0}, {1.064E-6, 0.0}}; interp = piecewisecubic; argunit = m; fununit = 1
  mat7: Common "Ta2O5 (Tantalum pentoxide) (Gao et al. 2012: n,k 0.35-1.8 µm) 1" on domains 4, 10, 16
    RefractiveIndex
      n = n_interp(c_const/freq)
      ki = k_interp(c_const/freq)
      int1: Interpolation "Refractive index"
        funcname = n_interp
        table = 
          {3.5E-7, 2.317048}
          {3.52E-7, 2.313395}
          {3.54e-07, 2.309832}
          {3.56e-07, 2.306355}
          {3.58e-07, 2.302962}
          {3.6E-7, 2.299649}
          {3.62E-7, 2.296414}
          {3.64E-7, 2.293255}
          {3.66e-07, 2.290169}
          {3.68e-07, 2.287153}
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        interp = piecewisecubic
        argunit = m
        fununit = 1
      int2: Interpolation "Refractive index, imaginary part"
        funcname = k_interp
        table = 
          {3.5E-7, 6.55E-4}
          {3.52E-7, 6.37E-4}
          {3.54e-07, 6.19E-4}
          {3.56e-07, 6.02E-4}
          {3.58e-07, 5.85E-4}
          {3.6E-7, 5.69E-4}
          {3.62E-7, 5.53E-4}
          {3.64E-7, 5.38E-4}
          {3.66e-07, 5.23E-4}
          {3.68e-07, 5.09E-4}
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        interp = piecewisecubic
        argunit = m
        fununit = 1

Physics
  ewfd: ElectromagneticWavesFrequencyDomain on all domains
    dependent variable E = {Ex, Ey, Ez}
    outofplanewavenumber.kz = 0
    wee1: WaveEquationElectric (default) | DisplacementFieldModel = RefractiveIndex
    pec1: PerfectElectricConductor (default)
    init1: init "Initial Values 1" (default)
    ecd1: ExternalCurrentDensity on domains 8-11 | Je = {Jf, 0, 0}

Mesh
  mesh1 "Mesh 1"
    size: MeshSizeDefault | hmax = 0.037500; hmin = 0.0011250; hcurve = 0.3; hgrad = 1.3; custom = on
    size1: Size on no domains | hmax = 0.026430; hmin = 7.9290E-4; hcurve = 0.3; hgrad = 1.3; custom = on
    size2: Size on domains 4, 10, 16 | hmax = 0.016180; hmin = 4.8550E-4; hcurve = 0.3; hgrad = 1.3; custom = on
    size3: Size on domains 1-3, 7-9, 13-15 | hmax = 0.013930; hmin = 4.1790E-4; hcurve = 0.3; hgrad = 1.3; custom = on
    dis1: Distribution on boundaries 4, 8, 10, 12, 14, 24, 27, 30, 34, 36-38 | type = predefined; elemcount = 10
    ftri1: FreeTri "Free Triangular 1" on domains 8-11
    map1: Map "Mapped 1" on domains 1-7, 12-18 | adjustedgdistr = on

Studies
  std1 "Study 1"
    wave: Wavelength "Wavelength Domain" | punit = nm; plist = range(300[nm],10[nm],350[nm]); useparam = on

Solver configurations
  sol1 "Solution 1" (study std1)
    v1: Variables "Dependent Variables 1"
    s1: Stationary "Stationary Solver 1" | stol = 0.01
      p1: Parametric
        sweeptype = filled
        pname = {lambda0, K}
        plistarr = {range(300[nm],10[nm],350[nm]), 100[keV]}
        punit = {nm, keV}
        pcontinuationmode = no
      fc1: FullyCoupled | linsolver = d1
      d1: Direct "Suggested Direct Solver (ewfd)"

Datasets
  dset1: Solution | solution = sol1
  cln1: CutLine2D | data = dset1; genpoints = {{0, -2.5}, {0, 2.5}}
  cln2: CutLine2D | data = dset1; genpoints = {{0, -2.5}, {0, 2.5}}

Plots
  pg1: PlotGroup2D "Electric Field (ewfd)" | data = dset1
    surf1: Surface | expr = ewfd.Ex; unit = V/m; descr = Electric field, x component
    arws1: ArrowSurface | expr = {ewfd.Poavx, ewfd.Poavy}; xnumber = 100; ynumber = 50
    arws2: ArrowSurface | expr = {ewfd.Ex, ewfd.Ey}; xnumber = 100; arrowlength = logarithmic
  pg2: PlotGroup1D "1D Plot Group 2" | data = dset1
    glob1: Global
      data = dset1
      expr = {acos(1/(beta*1.33)), asin(1.33*sin(acos(1/(beta*1.33))))}
      unit = {deg, deg}
      descr = {Cherenkov angle, Transmited angle}
  pg3: PlotGroup2D "2D Plot Group 3" | data = dset1
    surf1: Surface (disabled) | data = dset1; expr = ewfd.k; descr = Wave number
    con1: Contour | data = dset1; expr = ewfd.Ex