// COMSOL Multiphysics 5.5.0.292 model "transition radiation.mph"
// Outline of the model tree

Parameters
  epsilon_b = 5.3  // Background permitivity
  omega_p = 1.39e16 [rad/s]  // Plasma frequency
  gamma = 3.21e13 [Hz]  // Damping parameter
  q = -1.6e-19 [C]  // Particle charge
  K = 511[keV]  // Kinetic energy
  E0 = 511[keV]  // Rest energy
  sigma = 1 [nm]  // Sigma parameter (standard deviation)
  beta = sqrt(1-(1/((K/E0)+1))^2)  // Beta paramter
  v0 = beta*c_const  // Particle velocity

Variables
  var1 "Variables 1"
    epsilon_r = epsilon_b-omega_p^2/(ewfd.omega^2-i*gamma*ewfd.omega)  // Dielectric permitivity for Silver (Ag)
    beta = sqrt(1-(1/((K/E0)+1))^2)  // Beta paramter
    v0 = beta*c_const  // Particle velocity
    pulse1 = (1/sqrt(2*pi)/sigma)*exp(-(x)^2/(2*sigma^2))  // Gaussian approximation for delta(x)
    pulse2 = (1/sqrt(2*pi))*exp(i*ewfd.omega*(y-1.6[um])/v0)  // Fourier transform for delta(y-v0*t)
    pulse3 = (1/sqrt(2*pi)/sigma)  // Gaussian approximation for delta(z=0)
    Jfper = q*pulse1*pulse2*pulse3*ewfd.omega  // Current density Fourier transform (perpendicular)
    pulse4 = (1/sqrt(2*pi))*exp(-i*ewfd.omega*(x+2[um])/v0)  // Fourier transform for delta(x-v0*t)
    pulse5 = (1/sqrt(2*pi)/sigma)*exp(-(y-5[nm])^2/(2*sigma^2))  // Gaussian approximation for delta(y)
    pulse6 = (1/sqrt(2*pi)/sigma)  // Gaussian approximation for delta(z=0)
    Jfpar = q*pulse4*pulse5*pulse6*ewfd2.omega  // Current density Fourier transform (parallel)

Coordinate systems
  pml1: PML "Perfectly Matched Layer 1" on domains 1-3, 6-9

Geometry
  geom1 "Geometry 1" (2D, length unit µm)
    r1: Rectangle
      pos = {0, 1}
      base = center
      layername = Layer 1
      layer = 0.4
      layerleft = on
      layerright = on
      layerbottom = off
      layertop = on
      size = {4.8, 2}
    r2: Rectangle
      pos = {0, -0.02}
      base = center
      layername = Layer 1
      layer = 0.4
      layerleft = on
      layerright = on
      layerbottom = off
      size = {4.8, 0.04}
    fin: Finalize "Form Union"

Materials
  mat1: Common "Material 1" on domains 2, 3, 5, 6, 8, 9
    def "Basic"
      relpermittivity = 1
      relpermeability = 1
      electricconductivity = 0
    RefractiveIndex
      n = 1
      ki = 0
  mat2: Common "Ag (Silver) (Babar and Weaver 2015: n,k 0.2066-12.40 µm)" on domains 1, 4, 7
    RefractiveIndex
      n = n_interp(c_const/freq)
      ki = k_interp(c_const/freq)
      int1: Interpolation "Refractive index"
        funcname = n_interp
        table = 
          {2.066e-07, 1.079}
          {2.101E-7, 1.101}
          {2.138e-07, 1.121}
          {2.175e-07, 1.14}
          {2.214E-7, 1.157}
          {2.254e-07, 1.169}
          {2.296E-7, 1.181}
          {2.339E-7, 1.19}
          {2.384E-7, 1.198}
          {2.431E-7, 1.215}
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        interp = piecewisecubic
        argunit = m
        fununit = 1
      int2: Interpolation "Refractive index, imaginary part"
        funcname = k_interp
        table = 
          {2.066e-07, 1.247}
          {2.101E-7, 1.258}
          {2.138e-07, 1.267}
          {2.175e-07, 1.272}
          {2.214E-7, 1.28}
          {2.254e-07, 1.283}
          {2.296E-7, 1.287}
          {2.339E-7, 1.294}
          {2.384E-7, 1.306}
          {2.431E-7, 1.317}
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        interp = piecewisecubic
        argunit = m
        fununit = 1

Physics
  ewfd: ElectromagneticWavesFrequencyDomain "Transition radiation" on domains 1-9
    dependent variable E = {Ex, Ey, Ez}
    wee1: WaveEquationElectric (default)
      DisplacementFieldModel = RelativePermittivity
      n_mat = from_mat
      ki_mat = from_mat
      epsilonr_mat = userdef
      epsilonr = 1
      mur_mat = userdef
      mur = 1
      sigma_mat = userdef
      sigma = 0
    pec1: PerfectElectricConductor (default)
    init1: init "Initial Values 1" (default)
    ecd1: ExternalCurrentDensity on domains 5 | Je = {0, -Jfper, 0}
    wee2: WaveEquationElectric on domains 1, 4, 7
      DisplacementFieldModel = RelativePermittivity
      epsilonr_mat = userdef
      epsilonr = epsilon_r
      mur_mat = userdef
      mur = 1
      sigma_mat = userdef
      sigma = 0
  ewfd2: ElectromagneticWavesFrequencyDomain "Parallel excitation" on domains 1-9
    dependent variable E2 = {E2x, E2y, E2z}
    wee1: WaveEquationElectric (default) | epsilonr = 1.77
    pec1: PerfectElectricConductor (default) | constraintType = symmetricConstraint; constraintMethod = elemental
    init1: init "Initial Values 1" (default)
    ecd1: ExternalCurrentDensity on domains 5 | Je = {Jfpar, 0, 0}
    wee2: WaveEquationElectric on domains 1, 4, 7
      DisplacementFieldModel = RelativePermittivity
      epsilonr = epsilon_r
      ConstitutiveRelationH = RelativePermeability
      mur = 1

Mesh
  mesh1 "Mesh 1"
    size: MeshSizeDefault | hauto = 1
    dis1: Distribution on boundaries 2, 4, 6, 12, 16, 18-20 | type = predefined; elemcount = 10
    ftri1: FreeTri "Free Triangular 1" on domains 4, 5
    map1: Map "Mapped 1" on domains 1-3, 6-9 | adjustedgdistr = on

Studies
  std2 "Transition radiation"
    freq: Frequency "Frequency Domain" | punit = THz; plist = 800; solve for = {ewfd}; useparam = on
  std3 "Parallel excitation"
    freq: Frequency "Frequency Domain" | punit = THz; plist = 870; solve for = {ewfd2}; useparam = on

Solver configurations
  sol1 "Solution 1" (study std2)
    v1: Variables "Dependent Variables 1"
    s1: Stationary "Stationary Solver 1" | stol = 0.01
      p1: Parametric
        sweeptype = filled
        pname = {freq, K}
        plistarr = {800, range(50 [keV],50 [keV],500 [keV])}
        punit = {THz, keV}
        pcontinuationmode = no
      fc1: FullyCoupled | linsolver = d1
      d1: Direct "Suggested Direct Solver (ewfd)"
  sol2 "Solution 2" (study std3)
    v1: Variables "Dependent Variables 1"
    s1: Stationary "Stationary Solver 1" | stol = 0.01
      p1: Parametric
        sweeptype = filled
        pname = {freq, K}
        plistarr = {870, range(50 [keV],50 [keV],500 [keV])}
        punit = {THz, keV}
        pcontinuationmode = no
      fc1: FullyCoupled | linsolver = d1
      d1: Direct "Suggested Direct Solver (ewfd2)"

Datasets
  dset1: Solution | solution = sol1
  dset2: Solution | solution = sol2

Plots
  pg1: PlotGroup2D "Electric Field (ewfd)" | data = dset1
    surf1: Surface | expr = ewfd.Ey
    arws1: ArrowSurface (disabled) | expr = {ewfd.Poavx, ewfd.Poavy}; xnumber = 100; arrowlength = normalized
  pg2: PlotGroup2D "Electric Field (ewfd2)" | data = dset2
    surf1: Surface | expr = ewfd2.Hz
    arws1: ArrowSurface | expr = {ewfd.Ex, ewfd.Ey}; xnumber = 100
  pg3: PlotGroup1D "1D Plot Group 3" | data = dset1
    glob1: Global | data = dset2; expr = acos(1/(beta*1.33)); unit = deg; xdata = expr; xdataexpr = K